// SBML level 2 version 4

model irt()

  // Compartments:
  // The fluid that circulates in the principal vascular system of human beings and other vertebrates, in humans consisting of plasma in which the red blood cells, white blood cells, and platelets are suspended.
  compartment BLOOD = 5 l; BLOOD is "Blood";
  // Tissue-draining (sentinel) lymph node. A lymph node is an oval-shaped organ of the lymphatic system, distributed widely throughout the body including the armpit and stomach and linked by lymphatic vessels.
  compartment LN = 0.015 l; LN is "Lymph node";
  // Inflammed tissue in human body (for example, tumor tissue, liver, lungs, skin, kidney etc.)
  compartment TISSUE = 1 l; TISSUE is "Tissue";
  // The pale yellow fluid portion of whole blood that consists of water and its dissolved constituents including proteins (as albumin, fibrinogen, and globulins), electrolytes, sugars, etc.
  compartment PLASMA in BLOOD = 2.75 l; PLASMA is "Blood plasma";

  // Species:
  // Concentration of Th0 cells in lymph node.
  species Th0_ln in LN = 0; Th0_ln is "Th0 in lymph node";  // substance in kcell
  // Concentration of Th2 cells in lymph node.
  species Th2_ln in LN = 0; Th2_ln is "Th2 in lymph node";  // substance in kcell
  // Concentration of Th2 cells in blood.
  species Th2_bld in BLOOD = 15000; Th2_bld is "Th2 in blood";  // substance in kcell
  // Concentration of Th2 cells in tissue.
  species Th2_ts in TISSUE = 0; Th2_ts is "Th2 in tissue";  // substance in kcell
  // Concentration of intermediate activated B cells (after antigen recognition) in lymph node
  species Bi_ln in LN = 0; Bi_ln is "Bi in lymph node";  // substance in kcell
  // Concentration of  “licensed” B cells (Bi activated by Th1 via CD40L-CD40 interaction) in lymph node
  species Ba_ln in LN = 0; Ba_ln is "Ba in lymph node";  // substance in kcell
  // Concentration of mature DC1 (after antigen recognition) in lymph node
  species mDC1_ln in LN = 0; mDC1_ln is "mDC1 in lymph node";  // substance in kcell
  // Concentration of "licensed" (activated by Th1 via CD40L-CD40 interaction) mature DC activated in lymph node
  species mDC1a_ln in LN = 0; mDC1a_ln is "mDC1a in lymph node";  // substance in kcell
  // Concentration of IL-10 in plasma.
  species IL10 in PLASMA = 0.7; IL10 is "IL-10 in plasma";  // substance in pmole
  // Concentration of TGFb in plasma.
  species TGFb in PLASMA = 728; TGFb is "TGFb in plasma";  // substance in pmole
  // Concentration of IL-2 in plasma.
  species IL2 in PLASMA = 0.9; IL2 is "IL-2 in plasma";  // substance in pmole
  // Concentration of IL-4 in plasma.
  species IL4 in PLASMA = 0.4; IL4 is "IL-4 in plasma";  // substance in pmole
  // Concentration of IL-5 in plasma.
  species IL5 in PLASMA = 0.4; IL5 is "IL-5 in plasma";  // substance in pmole
  // Concentration of IL-13 in plasma.
  species IL13 in PLASMA = 1.2; IL13 is "IL-13 in plasma";  // substance in pmole
  // Concentration of MHC class II on mDC1, mDC1a, Bi and Ba cells surface in lymph node
  species $MHC2 in LN; MHC2 is "MHC class II in lymph node";  // substance in pmole
  // Concentration of CD80/86 on mDC1, mDC1a, Bi and Ba cells surface in lymph node
  species $CD8086_cd4 in LN; CD8086_cd4 is "CD80/86 (on mDC1, mDC1a, Bi and Ba) in lymph node";  // substance in pmole
  // Total concentration of CTLA4 on Th0 cells surface in lymph node
  species $CTLA4_th0_total in LN; CTLA4_th0_total is "CTLA-4 (on Th0 cells) in lymph node";  // substance in pmole

  // Parameters:
  // Lymph flow rate.
  Q_lf = 0.06 l_per_h;
  // Emax of CTLA4 effect on Th0 cells differentiation into Th1 or Th2 or Th17 or Treg.
  Emax_ctla4_cd4 = 1 dl;
  // EC50 of CTLA4 effect on Th0 cells differentiation into Th1 or Th2 or Th17 or Treg.
  EC50_ctla4_cd4 = 1 pM;
  // Constant describing CTLA4 level on surface of 10^3 Th0 cells.
  c_th0_ctla4 = 2.5e-7 pmole_per_kcell;
  // Constant describing the effect of CD28 ligands on Th0 cells differentiation into Th2 cells (merged with parameter describing expression of CD28 per cell). The value is assumed to be the same as for Th1 cells.
  Keff_th0_to_th2_cd28 = 4.401e9 pM_kcell_per_l;
  // Rate constant of  Th0 cells differentiation into Th2 cells.
  k_th0_to_th2 = 1.85e-7 per_pM_h;
  // Constant describing the effect of IL-4 on Th0 cells differentiation into Th2 cells.
  Keff_th0_to_th2_il4 = 213.7 pM;
  // Rate constant of Th2 cells apoptosis in LN.
  k_apo_th2_ln = 1 per_h;
  // Rate constant of  Th2 cells proliferation. The value is assumed to be the same as for Th1 cells.
  k_pro_th2 = 0.143 per_h;
  // Emax of TGFb effect on Th2 cells proliferation.
  Emax_pro_th2_tgfb = 1 dl;
  // EC50 of TGFb effect on Th2 cells proliferation.
  EC50_pro_th2_tgfb = 1 pM;
  // Constant describing the effect of IL-2 on Th2 cells proliferation. The value is assumed to be the same as for Th1 cells.
  Keff_pro_th2_il2 = 1315 pM;
  // Rate constant of Th2 cells apoptosis in blood.
  k_apo_th2_bld = 1 per_h;
  // Rate constant of Th2 cells migration from blood to tissue.
  Q_bld_to_ts_th2 = 1 l_per_h;
  // Rate constant of  Th2 cells apoptosis in tissue.
  k_apo_th2_ts = 1 per_h;
  // Constant describing MHC class II level on surface of 10^3 Bi cells.
  c_bi_mhc2 = 1 pmole_per_kcell;
  // Constant describing MHC class II level on surface of 10^3 Ba cells.
  c_ba_mhc2 = 1 pmole_per_kcell;
  // Constant describing CD80/86 level on surface of 10^3 Bi cells.
  c_bi_cd8086 = 1.17e-6 pmole_per_kcell;
  // Constant describing CD80/86 level on surface of 10^3 Ba cells.
  c_ba_cd8086 = 1 pmole_per_kcell;
  // Constant describing MHC class II level on surface of 10^3 mDC1.
  c_mdc1_mhc2 = 1 pmole_per_kcell;
  // Constant describing MHC class II level on surface of 10^3 mDC1a.
  c_mdc1a_mhc2 = 0.000223 pmole_per_kcell;
  // Constant describing CD80/86 level on surface of 10^3 mDC1.
  c_mdc1_cd8086 = 1 pmole_per_kcell;
  // Constant describing CD80/86 level on surface of 10^3 mDC1a.
  c_mdc1a_cd8086 = 1 pmole_per_kcell;
  // Rate constant of  IL-10 synthesis by Th2 cells.
  k_syn_il10_th2 = 0.0001294 pmole_per_kcell_h;
  // Rate constant of  IL-4 synthesis by Th2 cells.
  k_syn_il4_th2 = 1 pmole_per_kcell_h;
  // Rate constant of IL-4 synthesis by other cells.
  V_syn_il4_other = 1 pM_per_h;
  // Rate constant of IL-4 degradation.
  k_deg_il4 = 2.17 per_h;
  // Rate constant of  IL-5 synthesis by Th2 cells .
  k_syn_il5_th2 = 6.11e-5 pmole_per_kcell_h;
  // Rate constant of IL-5 synthesis by other cells.
  V_syn_il5_other = 1 pM_per_h;
  // Rate constant of IL-5 degradation.
  k_deg_il5 = 1 per_h;
  // Rate constant of  IL-13 synthesis by Th2 cells.
  k_syn_il13_th2 = 0.002193 pmole_per_kcell_h;
  // Inhibitory effect of CTLA4 on Th0 cells differentiation into Th1/Th2/Th17/Treg cells
  CTLA4_inf_th0 has dl;
  // Stimulatory effect of IL-4 on Th0 cells differentiation into Th2 cells
  IL4_inf_th2 has dl;
  // Stimulatory effect of CD28 ligands on Th0 cells differentiation into Th2 cells
  CD28_inf_th2 has dl;
  // Inhibitory effect of TGFb on Th2 cells proliferation
  TGFb_inf_th2 has dl;

  // Assignment rules:
  MHC2 := c_mdc1_mhc2*mDC1_ln + c_mdc1a_mhc2*mDC1a_ln + c_bi_mhc2*Bi_ln + c_ba_mhc2*Ba_ln;
  CD8086_cd4 := c_mdc1_cd8086*mDC1_ln + c_mdc1a_cd8086*mDC1a_ln + c_bi_cd8086*Bi_ln + c_ba_cd8086*Ba_ln;
  CTLA4_th0_total := c_th0_ctla4*Th0_ln;
  CTLA4_inf_th0 := 1 - Emax_ctla4_cd4*CTLA4_th0_total*CD8086_cd4/(CTLA4_th0_total*CD8086_cd4 + EC50_ctla4_cd4);
  CD28_inf_th2 := 1 + CD8086_cd4*Th0_ln/Keff_th0_to_th2_cd28;
  IL4_inf_th2 := 1 + IL4/Keff_th0_to_th2_il4;
  TGFb_inf_th2 := 1 - Emax_pro_th2_tgfb*TGFb/(EC50_pro_th2_tgfb + TGFb);

  // Reactions:
  // APC induces differentiation of Th0 into Th2 by stimulation of CD3 (TCR) and CD28 (co-stimulatory molecule). IL-4 stimulates this process.  Co-inhibitory molecules such as CTLA-4 (presented on surface of CD8 T cells and competing with CD28 for CD80/86), PD-1 (presented on surface of CD8 T cells and interacting with PD-L1) and PD-L1 (presented on surface of antigen presenting cells and interacting with PD-1) inhibit Th0 cells differentiation into Th2 cells.
  V54_th0_to_th2_ln: Th0_ln => Th2_ln; LN*k_th0_to_th2*Th0_ln*MHC2*IL4_inf_th2*CD28_inf_th2*CTLA4_inf_th0; V54_th0_to_th2_ln is "Differentiation of Th0 cells into Th2 cells in lymph node";  // modifiers: MHC2, CD8086_cd4, CTLA4_th0_total, IL4
  V55_apo_th2_ln: Th2_ln => ; LN*k_apo_th2_ln*Th2_ln; V55_apo_th2_ln is "Apoptosis of Th2 cells in lymph node";
  // Th2 cells are able to proliferate. IL-2 stimulates and TGFb inhibits Th2 cells proliferation.
  V56_pro_th2_ln: => Th2_ln; LN*k_pro_th2*Th2_ln*(1 + IL2/Keff_pro_th2_il2)*TGFb_inf_th2; V56_pro_th2_ln is "Proliferation of Th2 cells in lymph node";  // modifiers: IL2
  // Cells leave lymph node via the efferent lymphatics.
  V57_ln_to_bld_th2: Th2_ln => Th2_bld; Q_lf*Th2_ln; V57_ln_to_bld_th2 is "Migration of Th2 cells from lymph node to blood";
  V58_apo_th2_bld: Th2_bld => ; BLOOD*k_apo_th2_bld*Th2_bld; V58_apo_th2_bld is "Apoptosis of Th2 cells in blood";
  // Th2 are able to migrate to inflamed tissue due to the presence of specific molecules on activated T cells surface.
  V59_bld_to_ts_th2: Th2_bld => Th2_ts; Q_bld_to_ts_th2*Th2_bld; V59_bld_to_ts_th2 is "Migration of Th2 cells from blood to tissue";
  V60_apo_th2_ts: Th2_ts => ; TISSUE*k_apo_th2_ts*Th2_ts; V60_apo_th2_ts is "Apoptosis of Th2 cells in tissue";
  // Cells migrate from inflammed tissue to lymph node via the afferent lymphatics.
  V61_ts_to_ln_th2: Th2_ts => Th2_ln; Q_lf*Th2_ts; V61_ts_to_ln_th2 is "Migration of Th2 cells from tissue to lymph node";
  // Th2 cells are able to produce IL-10.
  V204_syn_il10_th2_bld: => IL10; k_syn_il10_th2*BLOOD*Th2_bld; V204_syn_il10_th2_bld is "Synthesis of IL-10 by Th2 cells in blood";  // modifiers: Th2_bld
  // Th2 cells are able to produce IL-10.
  V208_syn_il10_th2_ln: => IL10; k_syn_il10_th2*LN*Th2_ln; V208_syn_il10_th2_ln is "Synthesis of IL-10 by Th2 cells in lymph node";  // modifiers: Th2_ln
  // Th2 cells are able to produce IL-10.
  V213_syn_il10_th2_ts: => IL10; k_syn_il10_th2*TISSUE*Th2_ts; V213_syn_il10_th2_ts is "Synthesis of IL-10 by Th2 cells in tissue";  // modifiers: Th2_ts
  // Th2 cells are able to produce IL-4.
  V235_syn_il4_th2_bld: => IL4; k_syn_il4_th2*BLOOD*Th2_bld; V235_syn_il4_th2_bld is "Synthesis of IL-4 by Th2 cells in blood";  // modifiers: Th2_bld
  // Th2 cells are able to produce IL-4.
  V236_syn_il4_th2_ln: => IL4; k_syn_il4_th2*LN*Th2_ln; V236_syn_il4_th2_ln is "Synthesis of IL-4 by Th2 cells in lymph node";  // modifiers: Th2_ln
  // Th2 cells are able to produce IL-4.
  V237_syn_il4_th2_ts: => IL4; k_syn_il4_th2*TISSUE*Th2_ts; V237_syn_il4_th2_ts is "Synthesis of IL-4 by Th2 cells in tissue";  // modifiers: Th2_ts
  // Production of IL-4 by cells that are not included in IRT.
  V238_syn_il4_other: => IL4; PLASMA*V_syn_il4_other; V238_syn_il4_other is "Synthesis of IL-4 by other cells";
  V239_deg_il4: IL4 => ; PLASMA*k_deg_il4*IL4; V239_deg_il4 is "Degradation of IL-4";
  // Th2 cells are able to produce IL-5.
  V240_syn_il5_th2_bld: => IL5; k_syn_il5_th2*BLOOD*Th2_bld; V240_syn_il5_th2_bld is "Synthesis of IL-5 by Th2 cells in blood";  // modifiers: Th2_bld
  // Th2 cells are able to produce IL-5.
  V241_syn_il5_th2_ln: => IL5; k_syn_il5_th2*LN*Th2_ln; V241_syn_il5_th2_ln is "Synthesis of IL-5 by Th2 cells in lymph node";  // modifiers: Th2_ln
  // Th2 cells are able to produce IL-5.
  V242_syn_il5_th2_ts: => IL5; k_syn_il5_th2*TISSUE*Th2_ts; V242_syn_il5_th2_ts is "Synthesis of IL-5 by Th2 cells in tissue";  // modifiers: Th2_ts
  // Production of IL-5 by cells that are not included in IRT.
  V243_syn_il5_other: => IL5; PLASMA*V_syn_il5_other; V243_syn_il5_other is "Synthesis of IL-5 by other cells";
  V244_deg_il5: IL5 => ; PLASMA*k_deg_il5*IL5; V244_deg_il5 is "Degradation of IL-5";
  // Th2 cells are able to produce IL-13.
  V245_syn_il13_th2_bld: => IL13; k_syn_il13_th2*BLOOD*Th2_bld; V245_syn_il13_th2_bld is "Synthesis of IL-13 by Th2 cells in blood";  // modifiers: Th2_bld
  // Th2 cells are able to produce IL-13.
  V246_syn_il13_th2_ln: => IL13; k_syn_il13_th2*LN*Th2_ln; V246_syn_il13_th2_ln is "Synthesis of IL-13 by Th2 cells in lymph node";  // modifiers: Th2_ln
  // Th2 cells are able to produce IL-13.
  V247_syn_il13_th2_ts: => IL13; k_syn_il13_th2*TISSUE*Th2_ts; V247_syn_il13_th2_ts is "Synthesis of IL-13 by Th2 cells in tissue";  // modifiers: Th2_ts

  // Unit definitions:
  unit pM = 1e-12 mole / litre;
  unit pmole = 1e-12 mole;
  unit l = litre;
  unit kcell = 1000 item; kcell is "Kcell";
  unit dl = dimensionless;
  unit l_per_h = litre / (3600 second); l_per_h is "\frac{l}{h}";
  unit pmole_per_kcell = 1e-12 mole / (1000 item); pmole_per_kcell is "\frac{pmole}{Kcell}";
  unit per_h = 1 / (3600 second); per_h is "h^{-1}";
  unit pM_per_h = 1e-12 mole / (litre * 3600 second); pM_per_h is "\frac{pM}{h}";
  unit pmole_per_kcell_h = 1e-12 mole / (1000 item * 3600 second); pmole_per_kcell_h is "\frac{pmole}{Kcell \cdot h}";
  unit per_pM_h = litre / (1e-12 mole * 3600 second); per_pM_h is "\frac{1}{pM \cdot h}";
  unit pM_kcell_per_l = 1e-12 mole * 1000 item / litre^2; pM_kcell_per_l is "\frac{pM \cdot Kcell}{l}";
end
